VAX := READPRN("2.LIB")
VAX = [
    0, 0;
    0.019996, 8e-6;
    0.039992, 1.6e-5;
    0.059988, 2.4e-5;
    0.079984, 3.2e-5;
    0.09998, 4e-5;
    0.119976, 4.8e-5;
    0.139972, 5.6e-5;
    0.159968, 6.4e-5;
    0.179964, 7.2e-5
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]
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VAX[:, 0] = [
    0; 0.019996; 0.039992; 0.059988; 0.079984; 0.09998; 0.119976; 0.139972; 0.159968; 0.179964
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]
VAX[:, 1] = [
    0; 8e-6; 1.6e-5; 2.4e-5; 3.2e-5; 4e-5; 4.8e-5; 5.6e-5; 6.4e-5; 7.2e-5
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]
VAX[:, 1][10] = 8.01e-5
VAX[:, 0][1] = 0.019996
Id1 := 0.61899
Ud1 := 0.0011348
Id2 := 0.74705
Ud2 := 0.053095
Id3 := 0.79548
Ud3 := 0.12468
Id4 := 0.81669
Ud4 := 0.16347
Rb := (Ud1 - 2*Ud2 + Ud3)/Id1
Rb = 0.0317046
NFt := ((3*Ud2 - 2*Ud1) - Ud3)/ln(2)
NFt = 0.0466501
Io := Id1*e^((Ud3 - 2*Ud2)/NFt)
Io = 0.920065
Rb = 0.0317046
NFt = 0.0466501
Io = 0.920065  # начальные приближения
Given
Ud1 == (Id1*Rb + NFt*ln((Id1 + Io)/Io))
Id1 == Io*(e^((Ud1 - Id1*Rb)/NFt) - 1)
Ud2 == (Id2*Rb + NFt*ln((Id2 + Io)/Io))
Id2 == Io*(e^((Ud2 - Id2*Rb)/NFt) - 1)
Ud3 == (Id3*Rb + NFt*ln((Id3 + Io)/Io))
Id3 == Io*(e^((Ud3 - Id3*Rb)/NFt) - 1)
Ud4 == (Id4*Rb + NFt*ln((Id4 + Io)/Io))
Id4 == Io*(e^((Ud4 - Id4*Rb)/NFt) - 1)
Diod_F := Find(Ud1, Id1, Ud2, Id2, Ud3, Id3, Ud4, Id4)
Diod_F = [0.00586551; 0.0728635; 0.0532181; 0.777405; 0.158427; 2.90167; 0.254202; 5.22395]
# Вычисление параметров ВАХ (Is0, Rb, m, Ft)
Uk := Ik*Rb + ln((Is0 + Ik)/Is0)*m*Ft  # error: Эта переменная не определена.
Id1 = 0.61899
Ud1 = 0.0011348
Rb := 1
Is0 := 0.0000001
m := 2
Ft := 0.02  # начальные приближения
Id2 = 0.74705
Ud2 = 0.053095
Given
Id3 = 0.79548
Ud3 = 0.12468
0.619 == (1.135*10^-3*Rb + m*Ft*ln((1.135*10^-3 + Is0)/Is0))
Id4 = 0.81669
Ud4 = 0.16347
0.747 == (0.053*Rb + m*Ft*ln((0.053 + Is0)/Is0))
0.795 == (0.125*Rb + m*Ft*ln((0.125 + Is0)/Is0))
0.817 == (0.163*Rb + m*Ft*ln((0.163 + Is0)/Is0))
Diod_M := Minerr(Is0, Rb, m, Ft)
Diod_M = [4.51653e-13; 0.342616; 1.61256; 0.0177244]
Rb := 1
Is0 := 1.013*10^-10
m := 2.285
Ft := 0.022
# построение графика BAX диода по формуле:
Rb := 1
NFt := 0.0255
Is0 := 10^-14
Idiod := 0, 10^-5 .. 0.023  # ранжированная переменная тока диода
Udiod(Idiod) := Idiod*Rb + NFt*ln((Idiod + Is0)/Is0)
Udiod = ƒ(Unitless) → Unitless
Idiod =  # no stored result
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# проверка по напряжению модели и эксперимента
VAX[:, 0][45] = 0.788092
Iproverka := VAX[:, 1][45]
VAX[:, 1][45] = 0.112066
Udiod(Idiod) := Idiod*Rb + NFt*ln((Idiod + Is0)/Is0)
Udiod(Iproverka) = 0.878278
Idiod := VAX[:, 1]
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