Ud3 := 0.472
Id3 := 20*10^-3
Ud2 := 0.433
Id2 := 10*10^-3
Ud1 := 0.397
Id1 := 2*10^-3
# Задание а
Rb := (Ud1 - 2*Ud2 + Ud3)/Id1
Rb = 1.5
NFt := (3*Ud2 - 2*Ud1 - Ud3)/ln(2)
NFt = 0.0476089
Io := Id1*e^((Ud3 - 2*Ud2)/NFt)
Io = 5.0923e-7
# Rb - сопротивление базы
# Io - сила обратного тока
# Задание б
Id := 0, 0.5*10^-3 .. 50*10^-3
Ud(Id) := Id*Rb + NFt*ln((Id + Io)/Io)
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# Задание в
U := min(1.5, 1.6, 1.65)
U = 1.5
Rx(Ux, Ix) := Ux/Ix
R1 := Rx(U, 500*10^-3)
R1 = 3
R2 := Rx(U, 400*10^-3)
R2 = 3.75
R3 := Rx(U, 300*10^-3)
R3 = 5
Rn := 1/R1 + 1/R2 + 1/R3
R := 1/Rn
R = 1.25
I := U/R  # Ответ
I = 1.2
