VAR := READPRN("1.LIB")
i := 0 .. 4
Vvar := VAR[:, 0]
Vvar[i] = [-1; -3; -5; -7; -9]
Fmax := VAR[:, 1]
Fmax[i] = [390350; 415550; 432200; 444350; 454250]
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Fr := 1/(2*pi*sqrt((Ck + Cd)*Lk))  # error: Эта переменная не определена.
# Решение относительно Cd
Lk := 10^-3
Ck := 10^-10
pi := 3.14
Fr[i] := Fmax[i]
-(Ck*Lk - 1/(4*Fr^2*pi^2))/Lk
Cd := -(Ck*Lk - 1/(4*Fr^2*pi^2))/Lk
Cd = [6.64073e-11; 4.68365e-11; 3.5741e-11; 2.84193e-11; 2.28827e-11]
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Cd = [6.64073e-11; 4.68365e-11; 3.5741e-11; 2.84193e-11; 2.28827e-11]
U[i] := Vvar[i]
U = [-1; -3; -5; -7; -9]
Cd(U) := CJ0*(1 - U/VJ0)^(-M)  # error: Эта переменная не определена.
# Начальные условия, близкие к реальным значениям:
M := 0.5
VJ0 := 0.6
CJ0 := 10^-12
Given
6.641*10^-11 == CJ0*(1 - (-1)/VJ0)^(-M)
4.684*10^-11 == CJ0*(1 - (-2)/VJ0)^(-M)
3.574*10^-11 == CJ0*(1 - 3/VJ0)^(-M)
2.842*10^-11 == CJ0*(1 - (-4)/VJ0)^(-M)
2.288*10^-11 == CJ0*(1 - (-5)/VJ0)^(-M)
Minerr(CJ0, VJ0, M) = [4.68637e-11; -5.01482; -0.124019]
