VAR := READPRN("1.LIB")
i := 0 .. 4
Vvar := VAR[:, 0]
Vvar[i] = [-1; -2; -3; -4; -5]
Fmax := VAR[:, 1]
Fmax[i] = [390350; 415550; 432200; 444350; 454250]
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Fr := 1/(2*pi*sqrt((Ck + Cd)*Lk))  # error: Эта переменная не определена.
# Решение относительно Cd
Fr[i] := Fmax[i]
Lk := 10^-3
Ck := 70^-12
pi := 3.14
-(Ck*Lk - 1/(4*Fr^2*pi^2))/Lk
Cd := -(Ck*Lk - 1/(4*Fr^2*pi^2))/Lk
Cd = [1.66407e-10; 1.46837e-10; 1.35741e-10; 1.28419e-10; 1.22883e-10]
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Cd = [1.66407e-10; 1.46837e-10; 1.35741e-10; 1.28419e-10; 1.22883e-10]
U[i] := Vvar[i]
U = [-1; -2; -3; -4; -5]
Cd(U) := CJ0*(1 - U/VJ0)^(-M)  # error: Эта переменная не определена.
# Начальные условия, близкие к реальным значениям:
M := 0.5
VJ0 := 0.6
CJ0 := 10^-12
Given
1.664*10^-10 == CJ0*(1 - (-1)/VJ0)^(-M)
1.357*10^-10 == CJ0*(1 - (-3)/VJ0)^(-M)
1.229*10^-10 == CJ0*(1 - (-5)/VJ0)^(-M)
Minerr(CJ0, VJ0, M) = [2.54934e-10; 0.13573; 0.200818]
