VAX := READPRN("2.lvm")
VAX =  # no stored result
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VAX[:, 0] =  # no stored result
VAX[:, 1] =  # no stored result
VAX[:, 1][10] = 1.13906e-6
VAX[:, 0][1] = -0.0383967
Id1 := 0.62312
Ud1 := 0.00103566
Id2 := 0.64354
Ud2 := 0.00212532
Id3 := 0.58961
Ud3 := 0.000340715
Id4 := 0.56409
Ud4 := 0.000158211
Rb := (Ud1 - 2*Ud2 + Ud3)/Id1
Rb = -0.0046127
NFt := ((3*Ud2 - 2*Ud1) - Ud3)/ln(2)
NFt = 0.00571873
Io := Id1*e^((Ud3 - 2*Ud2)/NFt)
Io = 0.314516
# Вычисление параметров ВАХ (Is0, Rb, m, Ft)
Uk := Ik*Rb + ln((Is0 + Ik)/Is0)*m*Ft  # error: Эта переменная не определена.
Id1 = 0.62312
Ud1 = 0.00103566
Rb := 1
Is0 := 0.0000001
m := 2
Ft := 0.02  # начальные приближения
Id2 = 0.64354
Ud2 = 0.00212532
Given
Id3 = 0.58961
Ud3 = 0.000340715
0.623 == (1.036*10^-3*Rb + m*Ft*ln((1.036*10^-3 + Is0)/Is0))
Id4 = 0.56409
Ud4 = 0.000158211
0.644 == (2.125*10^-3*Rb + m*Ft*ln((2.125*10^-3 + Is0)/Is0))
0.59 == (3.407*10^-4*Rb + m*Ft*ln((3.407*10^-4 + Is0)/Is0))
0.564 == (1.582*10^-4*Rb + m*Ft*ln((1.582*10^-4 + Is0)/Is0))
Diod_M := Minerr(Is0, Rb, m, Ft)
Diod_M = [5.84658e-12; -3.24004; 1.8177; 0.0181609]
Rb := 1
Is0 := 1.013*10^-10
m := 2.285
Ft := 0.022
# построение графика BAX диода по формуле:
Rb := 1
NFt := 0.0255
Is0 := 10^-14
Idiod := 0, 10^-5 .. 0.023  # ранжированная переменная тока диода
Udiod(Idiod) := Idiod*Rb + NFt*ln((Idiod + Is0)/Is0)
Udiod = ƒ(Unitless) → Unitless
Idiod =  # no stored result
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# проверка по напряжению модели и эксперимента
VAX[:, 0][45] = -0.0289199
Iproverka := VAX[:, 1][45]
VAX[:, 1][45] = 1.14843e-6
Udiod(Idiod) := Idiod*Rb + NFt*ln((Idiod + Is0)/Is0)
Udiod(Iproverka) = 0.473258
Idiod := VAX[:, 1]
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