Fr := [364706; 384118; 366263; 363149; 364706]
V2 := [6; 8; 10; 12; 14]
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Lk := 10^-3
Ck := 70*10^-12
pi := 3.14159
Cd := (Ck*Lk - 1/(4*Fr^2*pi^2))/(-Lk)
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Cd = [1.20439e-10; 1.01677e-10; 1.18823e-10; 1.22075e-10; 1.20439e-10]
M := 0.2
VJ0 := 0.6
CJ0 := 10^-12
Given
Cd[0] == CJ0*(1 - (-1)/VJ0)^(-M)
Cd[1] == CJ0*(1 - (-2)/VJ0)^(-M)
Cd[2] == CJ0*(1 - (-3)/VJ0)^(-M)
Minerr(CJ0, VJ0, M) = [1.94612e-10; 1.77471e-6; 0.0388811]
